*Heading
** Job name: abaqus-double-notched Model name: Model-1
** Generated by: Abaqus/CAE 2019
*Preprint, echo=NO, model=NO, history=NO, contact=NO
**
** PARTS
**
*Part, name=Part-1
*Node
      1,         -25.,         -17.,           0.
      2,         -25.,         -20.,           0.
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*Element, type=C3D8R
    1,   477,   643,   720,   476,  2715,  2881,  2958,  2714
    2,     5,   576,   643,   477,  2243,  2814,  2881,  2715
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*Nset, nset=Set-1, generate
     1,  24618,      1
*Elset, elset=Set-1, generate
     1,  21200,      1
*Orientation, name=Ori-1
1., 0., 0., 0., 1., 0.
3, 90.
** Section: Section-1
*Solid Section, elset=Set-1, orientation=Ori-1, material=Material-1
,
*Hourglass Stiffness
203.125
*End Part
**
**
** ASSEMBLY
**
*Assembly, name=Assembly
**
*Instance, name=Part-1-1, part=Part-1
*End Instance
**
*Nset, nset=Set-1, instance=Part-1-1
     5,    81,    82,    83,    84,    85
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*Elset, elset=Set-1, instance=Part-1-1
     2,     4,     6,   221,   223,   301
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*Nset, nset=Set-2, instance=Part-1-1
    25,    26,    27,    28,    29,    30
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*Elset, elset=Set-2, instance=Part-1-1
    30,    32,    33,    72,    74,    75
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*Nset, nset=Surface, instance=Part-1-1, generate
 22381,  24618,      1
*Elset, elset=Surface, instance=Part-1-1, generate
 19081,  21200,      1
*End Assembly
**
** MATERIALS
**
*Material, name=Material-1
*User Material, constants=32
 0, 0, 200000.0, 0.3, 2, 0.802064, -0.371744, 1.730877,
 0.111897, 1.786988, 1.759011, 1.0, 1.0, 1.514999, 0.149032, 0.137615,
 0.843118, -1.095887, 1.450332, 1.897261, 1.0, 1.0, -0.011837, 2.8455,
 2, 541.0, 0.0036, 0.249, 0, 6, 1.0, 1.0
**
*Depvar
 7,
 1 , PEEQ
 2 , PE11
 3 , PE22
 4 , PE33
 5 , PE12
 6 , PE13
 7 , PE23
*User Output Variables
 8,
**
** FORMING LIMIT DIAGRAM
**
*Property table type, name=FLD1, properties=5
*Property table type, name=FLD2, properties=5
*Table collection, name=FLD
*Property table, type=FLD1
  0.3,  0.2, 0.1, 0.2, 0.3
*Property table, type=FLD2
 -0.2, -0.1, 0.0, 0.1, 0.2
**
** BOUNDARY CONDITIONS
**
** Name: BC-1 Type: Symmetry/Antisymmetry/Encastre
*Boundary
Set-1, ENCASTRE
** Name: BC-2 Type: Displacement/Rotation
*Boundary
Set-2, 1, 1
Set-2, 3, 3
** ----------------------------------------------------------------
**
** STEP: Step-1
**
*Step, name=Step-1, nlgeom=YES, inc=100000
*Static
0.01, 1., 1e-05, 0.2
**
** BOUNDARY CONDITIONS
**
** Name: BC-2 Type: Displacement/Rotation
*Boundary
Set-2, 2, 2, 10.
**
** OUTPUT REQUESTS
**
*Restart, write, frequency=0
**
** FIELD OUTPUT: F-Output-1
**
*Output, field
*Node Output
 RF, U
*Element Output, directions=YES
 S, LE, SDV, UVARM
**
** HISTORY OUTPUT: H-Output-1
**
*Output, history, variable=PRESELECT
*End Step
