*Heading
** Job name: Tensile_Test Model name: Tensile_Test
** Generated by: Abaqus/CAE 2017
*Preprint, echo=NO, model=NO, history=NO, contact=NO
**
** PARTS
**
*Part, name=Part-1
*Node
      1,           0.,           0.
      2,           1.,           0.
      3,           0.,           1.
      4,           1.,           1.
*Element, type=CPS4R
 1, 1, 2, 4, 3
*Nset, nset=Set-1, generate
 1,  4,  1
*Elset, elset=Set-1
 1,
*Orientation, name=Local
 1., 0., 0., 0., 1., 0.
 3, 0.
*Orientation, name=Global
 1., 0., 0., 0., 1., 0.
 3, 0.
** Section: Section-1
*Solid Section, elset=Set-1, orientation=Local, material=Material-1
 1.,
*Hourglass Stiffness
203.125
*End Part
**
**
** ASSEMBLY
**
*Assembly, name=Assembly
**
*Instance, name=Part-1-1, part=Part-1
*End Instance
**
*Nset, nset=Set-1, instance=Part-1-1
 1, 3
*Elset, elset=Set-1, instance=Part-1-1
 1,
*Nset, nset=Set-2, instance=Part-1-1
 1, 2
*Elset, elset=Set-2, instance=Part-1-1
 1,
*Nset, nset=Set-3, instance=Part-1-1
 2, 4
*Elset, elset=Set-3, instance=Part-1-1
 1,
*End Assembly
**
** MATERIALS
**
*Material, name=Material-1
*User material, constants=30
 0, 0, 200000.0, 0.3, -2, 1.0, 1.0, 1.0,
 1.0, 1.0, 1.0, 1.0, 1.0, 8.0, 5, 180.0,
 5.06, 2.11, 52.2, 5, 3, 824.9, 56.5, 135.4,
 0.0684, 27509.4, 415.55, 6, 1, 1.0
*Depvar
 13,
 1 , PEEQ
 2 , PE11
 3 , PE22
 4 , PE12
 5 , ALPHA1-11
 6 , ALPHA1-22
 7 , ALPHA1-12
 8 , ALPHA2-11
 9 , ALPHA2-22
 10, ALPHA2-12
 11, ALPHA3-11
 12, ALPHA3-22
 13, ALPHA3-12
*User output variables
 11,
** FORMING LIMIT DIAGRAM
*Property table type, name=FLD1, properties=5
*Property table type, name=FLD2, properties=5
*Table collection, name=FLD
*Property table, type=FLD1
  0.3,  0.2, 0.1, 0.2, 0.3
*Property table, type=FLD2
 -0.2, -0.1, 0.0, 0.1, 0.2
**
** BOUNDARY CONDITIONS
**
** Name: BC-1 Type: Displacement/Rotation
*Boundary
 Set-1, 1, 1
** Name: BC-2 Type: Displacement/Rotation
*Boundary
 Set-2, 2, 2
** ----------------------------------------------------------------
**
** STEP: Step-1
**
*Step, name=Step-1, nlgeom=YES, inc=100000
*Static
 0.001, 1., 0.0001, 0.01
**
** BOUNDARY CONDITIONS
**
** Name: BC-3 Type: Displacement/Rotation
*Boundary
 Set-3, 1, 1, 1.0
**
** OUTPUT REQUESTS
**
*Restart, write, frequency=0
**
** FIELD OUTPUT: F-Output-1
**
*Output, field
*Node Output
 U,RF
*Element Output, directions=YES
 S,LE,SDV,UVARM
**
*End Step
