*Heading
UMMDp example (the deep drawing test with spherical punch by yld2004-18p)
** Generated by: Abaqus/CAE 6.14-5
*Preprint, echo=NO, model=NO, history=NO, contact=NO
** ----------------------------------------------------------------
**
** PART INSTANCE: PART-1-1
**
*Node
      1,           0.,          50.,  0.400000006
      2,           0.,          50.,           1.
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*Element, type=C3D8
    1,   233,  5790, 19342,  1380,     1,    22,  1240,    95
    2,  5790,  5791, 19343, 19342,    22,    23,  1241,  1240
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*Elset, elset=PART-1-1_PSOLID_3, generate
     1,  29520,      1
** Section: Section-1-PSOLID_3
*Solid Section, elset=PART-1-1_PSOLID_3, material=MATERIAL_PSOLID_3
,
** ----------------------------------------------------------------
**
** PART INSTANCE: lower_die-1
**
*System
          0.,          0.,          0.,          1.,          0.,          0.
          0., 6.12323399573677e-17,          1.
*Node
 200002,          26.,  -30.1000004,           0.
 200003,          26., -0.100000001,           0.
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*Element, type=R3D4
200001, 200002, 200008, 200108, 200047
200002, 200008, 200009, 200109, 200108
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** ----------------------------------------------------------------
**
** PART INSTANCE: punch-1
**
*System
          0.,          0.,          0.,          1.,          0.,          0.
          0., 6.12323399573677e-17,          1.
*Node
 300002,           0.,           0.,           0.
 300003,    1.9614774, -0.0770666599,           0.
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*Element, type=R3D4
300001, 300003, 300004, 300024, 300023
300002, 300004, 300005, 300025, 300024
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*Element, type=R3D3
300419, 300002, 300003, 300023
300420, 300002, 300023, 300043
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** ----------------------------------------------------------------
**
** PART INSTANCE: upper_die-1
**
*System
          0.,          0.,          0.,          1.,          0.,          0.
          0., 6.12323399573677e-17,          1.
*Node
 100002,         100.,           2.,           0.
 100003,        -100.,           2.,           0.
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*Element, type=R3D4
100001, 100004, 100150, 100152, 100071
100002, 100150, 100151, 100153, 100152
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*System
*Node
 300443,           0.,           0.,           0.
*Node
 300444,           0.,           0.,           2.
*Node
 300445,           0.,           0.,           3.
*Elset, elset=ALL_3DSOLID, generate
     1,  29520,      1
*Elset, elset=ALL_MASSIVE_ELEMENTS, generate
     1,  29520,      1
*Nset, nset=FIXX
     1,     2,     5,     6,    17,    18
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*Nset, nset=FIXY
     9,    10,    11,    12,    13,    15
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*Elset, elset=eLDie, generate
 200001,  200288,       1
*Elset, elset=ePunch, generate
 300001,  300440,       1
*Elset, elset=eUDie, generate
 100001,  100480,       1
*Nset, nset=rLDie
300444,
*Nset, nset=rPunch
300445,
*Nset, nset=rUDie
300443,
*Elset, elset=_sLDie_SPOS, generate
 200001,  200288,       1
*Surface, type=ELEMENT, name=sLDie
_sLDie_SPOS, SPOS
*Elset, elset=_sPunch_SNEG, generate
 300001,  300440,       1
*Surface, type=ELEMENT, name=sPunch
_sPunch_SNEG, SNEG
*Elset, elset=_sSheetNEG_S3
 18433, 18434, 18435, 18436, 18437, 18438
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*Elset, elset=_sSheetNEG_S4, generate
 13826,  18432,      2
*Surface, type=ELEMENT, name=sSheetNEG
_sSheetNEG_S3, S3
_sSheetNEG_S4, S4
*Elset, elset=_sSheetPOS_S2, generate
 23041,  24336,      1
*Elset, elset=_sSheetPOS_S3
  6913,  6914,  6915,  6916,  6917,  6918
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*Elset, elset=_sSheetPOS_S4, generate
    3,  6912,     3
*Surface, type=ELEMENT, name=sSheetPOS
_sSheetPOS_S2, S2
_sSheetPOS_S3, S3
_sSheetPOS_S4, S4
*Elset, elset=_sUDie_SPOS, generate
 100001,  100480,       1
*Surface, type=ELEMENT, name=sUDie
_sUDie_SPOS, SPOS
** Constraint: cLDie
*Rigid Body, ref node=rLDie, elset=eLDie
** Constraint: cPunch
*Rigid Body, ref node=rPunch, elset=ePunch
** Constraint: cUDie
*Rigid Body, ref node=rUDie, elset=eUDie
*Elset, elset=__Int-1_msm_1_SPOS, generate
 200001,  200096,       1
*Surface, type=ELEMENT, name=_Int-1_msm_1
__Int-1_msm_1_SPOS, SPOS
*Elset, elset=__Int-1_msm_3_SPOS, generate
 200193,  200288,       1
*Surface, type=ELEMENT, name=_Int-1_msm_3
__Int-1_msm_3_SPOS, SPOS
*Elset, elset=__Int-2_msm_1_SNEG, generate
 300001,  300440,       1
*Surface, type=ELEMENT, name=_Int-2_msm_1
__Int-2_msm_1_SNEG, SNEG
*Elset, elset=__Int-3_msm_2_SPOS, generate
 100097,  100208,       1
*Surface, type=ELEMENT, name=_Int-3_msm_2
__Int-3_msm_2_SPOS, SPOS
*Elset, elset=__Int-3_msm_3_SPOS, generate
 100209,  100320,       1
*Surface, type=ELEMENT, name=_Int-3_msm_3
__Int-3_msm_3_SPOS, SPOS
*Elset, elset=__Int-3_msm_4_SPOS, generate
 100321,  100400,       1
*Surface, type=ELEMENT, name=_Int-3_msm_4
__Int-3_msm_4_SPOS, SPOS
*Elset, elset=__Int-3_msm_5_SPOS, generate
 100401,  100480,       1
*Surface, type=ELEMENT, name=_Int-3_msm_5
__Int-3_msm_5_SPOS, SPOS
**
** MATERIALS
**
**  ---------------------------------------------------
**  ---- SOLID elements -------------------------------
**  ---------------------------------------------------
**
*Material, name=MATERIAL_PSOLID_3
*User Material, constants=29
******************************************************************2018.03.10.HT
********1,********2,********3,********4,********5,********6,********7,********8
**   nela         E        nu      nyld      c'12      c'13      c'21      c'23
        0,  69200.0,     0.33,        2, 0.567726, 1.011906, 0.918738, 0.949253
**   c'31      c'32      c'44      c'55      c'66      c"12      c"13      c"21
 0.804483, 0.541426, 0.641800, 1.000000, 1.000000, 0.881539, 1.281299, 1.468511
**   c'23      c'31      c'32      c'44      c'55      c"66         M       nih
 1.694334, 0.874666, 0.562107, 1.275310, 1.000000, 1.000000, 6.565182,        5
**    sy0         q         b         c      nkin
    126.0,    189.1,     13.1,    220.7,        0
******************************************************************2018.03.10.HT
*DEPVAR
8
*User Output Variables
2,
**
** INTERACTION PROPERTIES
**
*Surface Interaction, name=IntProp-1
1.,
*Friction, slip tolerance=0.005
 0.03,
*Surface Smoothing, name=Int-1
, _Int-1_msm_1, CIRCUMFERENTIAL, -1.42109e-14, -1.56866e-14, -24.1, -1.42109e-14, -1.56253e-14, -23.1
, _Int-1_msm_3, CIRCUMFERENTIAL, 7.10543e-15, 1.09588e-14, -24.1, 7.10543e-15, 1.102e-14, -23.1
*Surface Smoothing, name=Int-2
, _Int-2_msm_1, SPHERICAL, -7.10543e-15, 6.90689e-15, -25.
*Surface Smoothing, name=Int-3
, _Int-3_msm_2, CIRCUMFERENTIAL, -3.55271e-15, -4.66776e-15, 10.8, -3.55271e-15, -4.60653e-15, 11.8
, _Int-3_msm_3, CIRCUMFERENTIAL, 7.10543e-15, 1.48722e-14, 10.8, 7.10543e-15, 1.49334e-14, 11.8
, _Int-3_msm_4, TOROIDAL, 3.62377e-13, 4.48988e-14, 8., 3.61453e-13, 4.39931e-14, 9., 33.
, _Int-3_msm_5, TOROIDAL, 1.38556e-13, 2.6247e-14, 8., 1.48234e-13, 2.85e-14, 9., 33.
**
** BOUNDARY CONDITIONS
**
** Name: BCFIXX Type: 変位/回転
*Boundary
FIXX, 1, 1
** Name: BCFIXY Type: 変位/回転
*Boundary
FIXY, 2, 2
** Name: BCLDie0 Type: 変位/回転
*Boundary
rLDie, 1, 1
rLDie, 2, 2
rLDie, 3, 3
rLDie, 4, 4
rLDie, 5, 5
rLDie, 6, 6
** Name: BCPunch0 Type: 変位/回転
*Boundary
rPunch, 1, 1
rPunch, 2, 2
rPunch, 3, 3
rPunch, 4, 4
rPunch, 5, 5
rPunch, 6, 6
** Name: BCUDie0 Type: 変位/回転
*Boundary
rUDie, 1, 1
rUDie, 2, 2
rUDie, 3, 3
rUDie, 4, 4
rUDie, 5, 5
rUDie, 6, 6
**
** INTERACTIONS
**
** Interaction: Int-1
*Contact Pair, interaction=IntProp-1, type=SURFACE TO SURFACE, geometric correction=Int-1
sSheetNEG, sLDie
** Interaction: Int-2
*Contact Pair, interaction=IntProp-1, type=SURFACE TO SURFACE, geometric correction=Int-2
sSheetNEG, sPunch
** Interaction: Int-3
*Contact Pair, interaction=IntProp-1, type=SURFACE TO SURFACE, geometric correction=Int-3
sSheetPOS, sUDie
** ----------------------------------------------------------------
**
** STEP: Step-1
**
*Step, name=Step-1, nlgeom=YES, inc=100000
*Static
0.1, 1., 1e-12, 0.1
**
** BOUNDARY CONDITIONS
**
** Name: BCFIXX Type: 変位/回転
*Boundary, op=NEW
FIXX, 1, 1
** Name: BCFIXY Type: 変位/回転
*Boundary, op=NEW
FIXY, 2, 2
** Name: BCLDie1 Type: 変位/回転
*Boundary, op=NEW
rLDie, 1, 1
rLDie, 2, 2
rLDie, 3, 3, -0.14
rLDie, 4, 4
rLDie, 5, 5
rLDie, 6, 6
** Name: BCPunch1 Type: 変位/回転
*Boundary, op=NEW
rPunch, 1, 1
rPunch, 2, 2
rPunch, 3, 3
rPunch, 4, 4
rPunch, 5, 5
rPunch, 6, 6
** Name: BCUDie1 Type: 変位/回転
*Boundary, op=NEW
rUDie, 1, 1
rUDie, 2, 2
rUDie, 3, 3, -1.
rUDie, 4, 4
rUDie, 5, 5
rUDie, 6, 6
**
** OUTPUT REQUESTS
**
*Restart, write, frequency=0
**
** FIELD OUTPUT: F-Output-1
**
*Output, field, variable=PRESELECT
*Node Output
COORD
*Contact Output
CDISP, CDSTRESS, CFORCE, CNAREA, CSTATUS, CSTRESS, CTANDIR, PPRESS
*Element Output, elset=PART-1-1_PSOLID_3, directions=YES
SDV, UVARM
**
** HISTORY OUTPUT: H-Output-2
**
*Output, history
*Node Output, nset=rLDie
CF3, RF3, TF3, U3
**
** HISTORY OUTPUT: H-Output-1
**
*Node Output, nset=rPunch
CF3, RF3, TF3, U3
**
** HISTORY OUTPUT: H-Output-3
**
*Node Output, nset=rUDie
CF3, RF3, TF3, U3
*End Step
** ----------------------------------------------------------------
**
** STEP: Step-2
**
*Step, name=Step-2, nlgeom=YES, inc=100000
*Static, stabilize=0.0002, allsdtol=0, continue=NO
0.01, 1., 1e-6, 0.1
**
** BOUNDARY CONDITIONS
**
** Name: BCFIXX Type: 変位/回転
*Boundary, op=NEW
FIXX, 1, 1
** Name: BCFIXY Type: 変位/回転
*Boundary, op=NEW
FIXY, 2, 2
** Name: BCLDie1 Type: 変位/回転
*Boundary, op=NEW
rLDie, 1, 1
rLDie, 2, 2
rLDie, 3, 3, -0.14
rLDie, 4, 4
rLDie, 5, 5
rLDie, 6, 6
** Name: BCPunch2 Type: 変位/回転
*Boundary, op=NEW
rPunch, 1, 1
rPunch, 2, 2
rPunch, 3, 3, 40.
rPunch, 4, 4
rPunch, 5, 5
rPunch, 6, 6
** Name: BCUDie1 Type: 変位/回転
*Boundary, op=NEW
rUDie, 1, 1
rUDie, 2, 2
rUDie, 3, 3, -1.
rUDie, 4, 4
rUDie, 5, 5
rUDie, 6, 6
**
** OUTPUT REQUESTS
**
*Restart, write, frequency=0
**
** FIELD OUTPUT: F-Output-1
**
*Output, field, variable=PRESELECT
*Node Output
COORD
*Contact Output
CDISP, CDSTRESS, CFORCE, CNAREA, CSTATUS, CSTRESS, CTANDIR, PPRESS
*Element Output, elset=PART-1-1_PSOLID_3, directions=YES
SDV, UVARM
**
** HISTORY OUTPUT: H-Output-2
**
*Output, history
*Node Output, nset=rLDie
CF3, RF3, TF3, U3
**
** HISTORY OUTPUT: H-Output-1
**
*Node Output, nset=rPunch
CF3, RF3, TF3, U3
**
** HISTORY OUTPUT: H-Output-3
**
*Node Output, nset=rUDie
CF3, RF3, TF3, U3
*End Step
