*Heading
UMMDp example (the hole expansion test by yld2004-18p)
** Generated by: Abaqus/CAE 6.14-3
*Preprint, echo=NO, model=NO, history=NO, contact=NO
**
** PARTS
**
*Part, name=blankholder
*Node
      1,           0.,        -100.,           0.
      2,           0.,         -60.,           0.
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*Element, type=S4
  1,   1,  10, 475,  93
  2,  10,  11, 476, 475
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*Node
   2449,           0.,  -9.06671944e-15,          -5.
*Nset, nset=blankholder-RefPt_, internal
2449,
*Nset, nset=Set-5, generate
    1,  2448,     1
*Elset, elset=Set-5, generate
    1,  2304,     1
** Section: rigid
*Shell Section, elset=Set-5, material=elastic, offset=SNEG
1.0, 5
*End Part
**
*Part, name=die
*Node
      1,           0.,         -65.,   15.6599998
      2,           0.,         -80.,  0.660000026
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*Element, type=S4
  1,    1,   10,  559,  125
  2,   10,   11,  560,  559
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*Node
   6481,           0.,  1.81909575e-14,   15.6599998
*Nset, nset=die-RefPt_, internal
6481,
*Nset, nset=Set-6, generate
    1,  6480,     1
*Elset, elset=Set-6, generate
    1,  6336,     1
** Section: rigid
*Shell Section, elset=Set-6, material=elastic, offset=SNEG
1.0, 5
*End Part
**
*Part, name=punch
*Node
      1,         -50.,           0.,         -15.
      2,         -35.,           0.,           0.
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*Element, type=S4
  1,    1,   10,  406,  125
  2,   10,   11,  407,  406
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*Element, type=S3
1081,    5,  126, 1211
1082,    5, 1211, 1217
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*Node
   4466,           0.,           0.,           0.
*Nset, nset=punch-RefPt_, internal
4466,
*Nset, nset=Set-8, generate
    1,  4465,     1
*Elset, elset=Set-8, generate
    1,  4464,     1
** Section: rigid
*Shell Section, elset=Set-8, material=elastic, offset=SNEG
1.0, 5
*End Part
**
*Part, name=sheet
*Node
      1,          15.,           0.,  0.330000013
      2,   14.9857197,  0.654290795,  0.330000013
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*Element, type=S4
   1,   38,   39,    2,    1
   2,   39,   40,    3,    2
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*Elset, elset=Set-2, generate
    1,  2880,     1
** Section: sheet
*Shell Section, elset=Set-2, material=sheet
0.65, 5
*Transverse Shear Stiffness
41667, 41667
**
*End Part
**
**
** ASSEMBLY
**
*Assembly, name=Assembly
**
*Instance, name=blankholder-1, part=blankholder
*End Instance
**
*Instance, name=die-1, part=die
*End Instance
**
*Instance, name=punch-1, part=punch
*End Instance
**
*Instance, name=sheet-1, part=sheet
*End Instance
**
*Nset, nset=Set-2, instance=punch-1
 4466,
*Nset, nset=Set-3, instance=blankholder-1
 2449,
*Nset, nset=Set-4, instance=die-1
 6481,
*Nset, nset=Set-5, instance=sheet-1, generate
 2961,  2997,     1
*Nset, nset=Set-6, instance=sheet-1, generate
    1,  2961,    37
*Nset, nset=Set-7, instance=sheet-1, generate
   37,  2997,    37
*Nset, nset=b_Set-8, instance=die-1, generate
    1,  6480,     1
*Elset, elset=b_Set-8, instance=die-1, generate
    1,  6336,     1
*Nset, nset=b_Set-10, instance=blankholder-1, generate
    1,  2448,     1
*Elset, elset=b_Set-10, instance=blankholder-1, generate
    1,  2304,     1
*Nset, nset=b_Set-12, instance=punch-1, generate
    1,  4465,     1
*Elset, elset=b_Set-12, instance=punch-1, generate
    1,  4464,     1
*Nset, nset=_PickedSet35, internal, instance=die-1
 6481,
*Nset, nset=_PickedSet37, internal, instance=blankholder-1
 2449,
*Nset, nset=_PickedSet39, internal, instance=punch-1
 4466,
*Elset, elset=_Sheet-up_SPOS, internal, instance=sheet-1, generate
    1,  2880,     1
*Surface, type=ELEMENT, name=Sheet-up
_Sheet-up_SPOS, SPOS
*Elset, elset=_blankholder_SNEG, internal, instance=blankholder-1, generate
    1,  2304,     1
*Surface, type=ELEMENT, name=blankholder
_blankholder_SNEG, SNEG
*Elset, elset=_die_SNEG, internal, instance=die-1, generate
    1,  6336,     1
*Surface, type=ELEMENT, name=die
_die_SNEG, SNEG
*Elset, elset=_punch_SNEG, internal, instance=punch-1, generate
    1,  4464,     1
*Surface, type=ELEMENT, name=punch
_punch_SNEG, SNEG
*Elset, elset=_sheet-down_SNEG, internal, instance=sheet-1, generate
    1,  2880,     1
*Surface, type=ELEMENT, name=sheet-down
_sheet-down_SNEG, SNEG
** Constraint: blankholder
*Rigid Body, ref node=_PickedSet37, elset=b_Set-10
** Constraint: die
*Rigid Body, ref node=_PickedSet35, elset=b_Set-8
** Constraint: punch
*Rigid Body, ref node=_PickedSet39, elset=b_Set-12
*Elset, elset=__sheet-blankholder_msm_3_SNEG, internal, instance=blankholder-1, generate
  865,  1152,     1
*Surface, type=ELEMENT, name=_sheet-blankholder_msm_3, internal
__sheet-blankholder_msm_3_SNEG, SNEG
*Elset, elset=__sheet-blankholder_msm_4_SNEG, internal, instance=blankholder-1, generate
 1153,  1728,     1
*Surface, type=ELEMENT, name=_sheet-blankholder_msm_4, internal
__sheet-blankholder_msm_4_SNEG, SNEG
*Elset, elset=__sheet-blankholder_msm_5_SNEG, internal, instance=blankholder-1, generate
 1729,  2016,     1
*Surface, type=ELEMENT, name=_sheet-blankholder_msm_5, internal
__sheet-blankholder_msm_5_SNEG, SNEG
*Elset, elset=__sheet-die_msm_1_SNEG, internal, instance=die-1, generate
   1,  864,    1
*Surface, type=ELEMENT, name=_sheet-die_msm_1, internal
__sheet-die_msm_1_SNEG, SNEG
*Elset, elset=__sheet-die_msm_2_SNEG, internal, instance=die-1, generate
  865,  2592,     1
*Surface, type=ELEMENT, name=_sheet-die_msm_2, internal
__sheet-die_msm_2_SNEG, SNEG
*Elset, elset=__sheet-die_msm_6_SNEG, internal, instance=die-1, generate
 5473,  6336,     1
*Surface, type=ELEMENT, name=_sheet-die_msm_6, internal
__sheet-die_msm_6_SNEG, SNEG
*Elset, elset=__sheet-punch_msm_1_SNEG, internal, instance=punch-1, generate
   1,  864,    1
*Surface, type=ELEMENT, name=_sheet-punch_msm_1, internal
__sheet-punch_msm_1_SNEG, SNEG
*Elset, elset=__sheet-punch_msm_5_SNEG, internal, instance=punch-1, generate
 1621,  2484,     1
*Surface, type=ELEMENT, name=_sheet-punch_msm_5, internal
__sheet-punch_msm_5_SNEG, SNEG
*Elset, elset=__sheet-punch_msm_6_SNEG, internal, instance=punch-1, generate
 2485,  3348,     1
*Surface, type=ELEMENT, name=_sheet-punch_msm_6, internal
__sheet-punch_msm_6_SNEG, SNEG
*Elset, elset=__sheet-punch_msm_7_SNEG, internal, instance=punch-1, generate
 3349,  4212,     1
*Surface, type=ELEMENT, name=_sheet-punch_msm_7, internal
__sheet-punch_msm_7_SNEG, SNEG
*End Assembly
**
** MATERIALS
**
*Material, name=elastic
*Density
 7.8e-09,
*Elastic
200000., 0.3
*Material, name=sheet
*Density
 7.8e-09,
*User Material, constants=28
******************************************************************2018.03.10.HT
********1,********2,********3,********4,********5,********6,********7,********8
**   nela         E        nu      nyld      c'12      c'13      c'21      c'23
        0, 200000.0,      0.3,        2, 0.802064,-0.371744, 1.730877, 0.111897
**   c'31      c'32      c'44      c'55      c'66      c"12      c"13      c"21
 1.786988, 1.759011, 1.514999, 1.000000, 1.000000, 0.149032, 0.137615, 0.843118
**   c'23      c'31      c'32      c'44      c'55      c"66         M       nih
-1.095887, 1.450332, 1.897261,-0.011837, 1.000000, 1.000000, 2.845500,        2
** swft_c   swft_e0    swft_n      nkin
 541.0000, 0.003600, 0.249000,        0
**
**
*Depvar
4
*User Output Variables
2,
**
** INTERACTION PROPERTIES
**
*Surface Interaction, name=sheet-blankholder
1.,
*Friction, slip tolerance=0.005
 0.15,
*Surface Interaction, name=sheet-die
1.,
*Friction, slip tolerance=0.005
 0.15,
*Surface Interaction, name=sheet-punch
1.,
*Friction, slip tolerance=0.005
 0.03,
*Surface Smoothing, name=sheet-blankholder
, _sheet-blankholder_msm_3, TOROIDAL, -7.10543e-15, -1.77636e-14, -5., -1.62965e-15, -1.91021e-14, -4., 60.
, _sheet-blankholder_msm_4, TOROIDAL, -7.10543e-15, -1.77636e-14, -5., -1.62965e-15, -1.91021e-14, -4., 60.
, _sheet-blankholder_msm_5, TOROIDAL, -7.10543e-15, -1.77636e-14, -5., -1.62965e-15, -1.91021e-14, -4., 60.
*Surface Smoothing, name=sheet-die
, _sheet-die_msm_1, TOROIDAL, 0., 7.10543e-15, 15.66, 1.01361e-15, 6.7124e-15, 16.66, 80.
, _sheet-die_msm_2, TOROIDAL, 0., 7.10543e-15, 15.66, 1.01361e-15, 6.7124e-15, 16.66, 80.
, _sheet-die_msm_6, TOROIDAL, 0., 7.10543e-15, 15.66, 1.01361e-15, 6.7124e-15, 16.66, 80.
*Surface Smoothing, name=sheet-punch
, _sheet-punch_msm_1, TOROIDAL, 2.73559e-13, -7.81597e-14, -15., 2.77988e-13, -7.92794e-14, -14., 35.
, _sheet-punch_msm_5, TOROIDAL, 2.73559e-13, -7.81597e-14, -15., 2.77988e-13, -7.92794e-14, -14., 35.
, _sheet-punch_msm_6, TOROIDAL, 2.73559e-13, -7.81597e-14, -15., 2.77988e-13, -7.92794e-14, -14., 35.
, _sheet-punch_msm_7, TOROIDAL, 2.73559e-13, -7.81597e-14, -15., 2.77988e-13, -7.92794e-14, -14., 35.
**
** BOUNDARY CONDITIONS
**
** Name: blankholder Type: 対称/反対称/完全固定
*Boundary
Set-3, ENCASTRE
** Name: die Type: 対称/反対称/完全固定
*Boundary
Set-4, ENCASTRE
** Name: sheet-xsymm Type: 対称/反対称/完全固定
*Boundary
Set-7, XSYMM
** Name: sheet-ysymm Type: 対称/反対称/完全固定
*Boundary
Set-6, YSYMM
**
** INTERACTIONS
**
** Interaction: sheet-blankholder
*Contact Pair, interaction=sheet-blankholder, type=SURFACE TO SURFACE, geometric correction=sheet-blankholder
sheet-down, blankholder
** Interaction: sheet-die
*Contact Pair, interaction=sheet-die, type=SURFACE TO SURFACE, geometric correction=sheet-die
**Sheet-up, die
die, Sheet-up
** Interaction: sheet-punch
*Contact Pair, interaction=sheet-punch, type=SURFACE TO SURFACE, geometric correction=sheet-punch
**sheet-down, punch
punch, sheet-down
** ----------------------------------------------------------------
**
** STEP: Step-1
**
*Step, name=Step-1, nlgeom=YES, inc=1000
Step-1
*Static
0.001, 1., 1e-06, 0.01
**
** BOUNDARY CONDITIONS
**
** Name: punch Type: 変位/回転
*Boundary
Set-2, 1, 1
Set-2, 2, 2
Set-2, 3, 3, 30.
Set-2, 4, 4
Set-2, 5, 5
Set-2, 6, 6
** Name: sheet-fix Type: 変位/回転
*Boundary
Set-5, 1, 1
Set-5, 2, 2
Set-5, 3, 3
Set-5, 4, 4
Set-5, 5, 5
Set-5, 6, 6
**
** OUTPUT REQUESTS
**
*Restart, write, frequency=0
**
** FIELD OUTPUT: F-Output-1
**
*Output, field, variable=PRESELECT
*Element Output, elset=SHEET-1.SET-2, directions=YES
STH, SDV, UVARM
**
** HISTORY OUTPUT: H-Output-1
**
*Output, history, variable=PRESELECT
*End Step
